x := [0.02; 0.04; 0.06; 0.08; 0.1; 0.12; 0.14; 0.16; 0.18; 0.2; 0.26]
y := [0.72; 0.55; 0.4; 0.28; 0.23; 0.18; 0.16; 0.15; 0.15; 0.16; 0.19]
t := 0, 0.01 .. 0.3
csp := cspline(x, y)
psp := pspline(x, y)
lsp := lspline(x, y)
fcsp(t) := interp(csp, x, y, t)
fpsp(t) := interp(psp, x, y, t)
flsp(t) := interp(lsp, x, y, t)
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